############################### SIMULATION SETTINGS ###################################################

atom_style sphere
atom_modify map array
comm_modify vel yes
units si
newton off
neighbor      2e-3 bin
neigh_modify  delay 0
timestep 1e-6

######################### SIMULATION BOUNDING BOX, INTEGRATION, AND, GRAVITY ###########################

boundary f f f
region simBox block -0.05 0.05 -0.05 0.05 -0.05 0.05 units box
create_box 1 simBox

########################### PARTICLE MATERIAL PROPERTIES AND FORCE MODEL ###############################

pair_style granular
# E, nu, Y, gamma, psi_b, CoR
pair_coeff * * mdr 1e8 0.3 1e6 100 0.08 0.5 tangential linear_nohistory 0.0 0.0

######################################### ADD DIE AND ATOM PARAMETERIZATION ##############################################

variable numberOfAtoms           equal 100
variable atomRadius              equal 0.65e-3
variable atomDiameter            equal 2*${atomRadius}
variable atomDiameterLow         equal 0.8*${atomDiameter}
variable atomDiameterHigh        equal 1.2*${atomDiameter}
variable atomDensity             equal 1560
variable dieRadius               equal 4e-3
variable dieHeight               equal 1e-2
variable insertionRadius         equal ${dieRadius}-1.5*${atomRadius}
variable insertionLowerBound     equal ${dieHeight}*0.6 #1.5*${atomRadius}
variable insertionUpperBound     equal ${dieHeight}-1.5*${atomRadius}

region  atomInsertionRegion cylinder z 0 0 ${insertionRadius} ${insertionLowerBound} ${insertionUpperBound} side in units box

##################################### DEFINE RUN CONTROL VARIBLES  #############################################

variable settlingSteps equal 150000
variable zInitalPunchPosition equal ${dieHeight}
variable zFinalPunchPosition  equal ${dieHeight}*0.3
variable compressionStartStep equal ${settlingSteps}
variable compressionEndStep equal 250000
variable ejectionEndStep equal 300000
variable freeFloatEndStep equal 325000

variable punchAmplitude equal -(${zInitalPunchPosition}-${zFinalPunchPosition})
variable punchFrequency equal PI/2/(dt*(${compressionEndStep}-${compressionStartStep})/2)
variable punchShift equal ${compressionStartStep}*dt
variable triggerPunchMovement equal 0.5*(1.0+sign(step-${compressionStartStep}))
variable zPunchDisplacement equal v_triggerPunchMovement*(${punchAmplitude}*sin(${punchFrequency}*(step*dt-${punchShift})))
variable punchPeriod equal 2*PI/${punchFrequency}

variable lowerPunchPeriod equal ${punchPeriod}
variable lowerPunchAmplitude equal ${dieHeight}

######################################### ADD DIE AND PUNCH WALLS ################################################

variable wall_contact_string string "granular mdr 1e8 0.3 1e6 0.0 0.08 0.5 tangential linear_nohistory 0.0 0.0"

region lowerPunch plane 0 0 0 0 0 1 side in units box
region upperPunch plane 0 0 ${dieHeight} 0 0 -1 side in move NULL NULL v_zPunchDisplacement units box
#region upperPunch plane 0 0 ${dieHeight} 0 0 -1 side in units box
region die cylinder z 0 0 ${dieRadius} 0 ${dieHeight} side in units box

fix lowerPunch all wall/gran/region ${wall_contact_string} region lowerPunch contacts
fix upperPunch all wall/gran/region ${wall_contact_string} region upperPunch contacts
fix die all wall/gran/region ${wall_contact_string} region die contacts

fix print1 all print 1 "${zPunchDisplacement}" file upperPunchMovement.csv screen no

##################################### INSERT PARTICLES ####################################################

fix 1 all nve/sphere
fix grav all gravity 9.81 vector 0 0 -1
fix ins1 all pour 100 1 19985583 region atomInsertionRegion diam one ${atomDiameter} dens ${atomDensity} ${atomDensity}

######################################## SCREEN OUTPUT  ####################################################

compute       1 all erotate/sphere
thermo_style  custom dt step atoms ke vol
thermo        1000
thermo_modify lost ignore norm no

##################################### SET UP DUMP OUTPUTS  ####################################################

dump dumpParticles all vtk 1000 post/particles_*.vtk id x y z fx fy fz
#dump 1 all custom 1 uniaxialCompression id type f_plane_yz_neg[*]

#variable ax_yz_neg atom f_plane_yz_neg[5]
#variable afx_yz_neg atom f_plane_yz_neg[2]
#variable xpos equal v_ax_yz_neg[1]
#variable delta equal ${d}/2+v_xpos
#variable fx_neg equal v_afx_yz_neg[1]
#fix log all print 1 "${delta} ${fx_neg}" file uniaxialCompression.csv title "del,fx_yz_neg" screen no

######################################### BEGIN RUN  ##########################################################

run ${ejectionEndStep}
