############################### SIMULATION SETTINGS ###################################################

atom_style sphere 1
atom_modify map array
comm_modify vel yes
units si
newton off
neighbor      0.9e-3 bin
neigh_modify every 10 delay 2000 check no
timestep 1e-7
#processors 2 2 1

######################### SIMULATION BOUNDING BOX, INTEGRATION, AND, GRAVITY ###########################

boundary f f f
read_data spheres.data

######################################### ADD DIE AND ATOM PARAMETERIZATION ##############################################

variable atomRadius              equal 0.28e-3*1.5
variable atomDiameter            equal 2*${atomRadius}
variable atomDensity             equal 1560
variable dieRadius               equal 4e-3
variable dieHeight               equal 1e-2

########################### PARTICLE MATERIAL PROPERTIES AND FORCE MODEL ###############################

pair_style granular


variable YoungsModulus equal 9e9
variable khooke equal ${YoungsModulus}*${atomRadius}
variable etahooke equal 100.0
variable kt equal 2/7*${YoungsModulus}*${atomRadius}
variable kt_wall equal 2/7*${YoungsModulus}*${atomRadius}
variable xgammat equal 0.0
variable mu_s equal 1.0
variable mu_s_wall equal 0.1
variable mu_roll equal 0.85
variable k_roll equal 2.25*${mu_roll}*${mu_roll}*${YoungsModulus}*${atomRadius}
variable gamma_roll equal 0.0

pair_coeff * * hooke ${khooke} ${etahooke} damping none tangential linear_history ${kt} ${xgammat} ${mu_s} rolling sds ${k_roll} ${gamma_roll} ${mu_roll}

######################################### ADD DIE AND PUNCH WALLS ################################################

variable disp_upper equal 0.0
variable disp_lower equal 0.0
variable disp_xPlanePos equal 0.0
variable disp_xPlaneNeg equal 0.0

variable wall_contact_string string "granular hooke ${khooke} ${etahooke} damping none tangential linear_history ${kt_wall} ${xgammat} ${mu_s_wall} rolling sds ${k_roll} ${gamma_roll} ${mu_roll}"

variable dieHeight2 equal 2*${dieHeight}

region lowerPunch plane 0 0 0 0 0 1 side in units box move NULL NULL v_disp_lower units box
region upperPunch plane 0 0 ${dieHeight} 0 0 -1 side in move NULL NULL v_disp_upper units box
region die cylinder z 0 0 ${dieRadius} 0 ${dieHeight2} side in units box
variable dieRadiusPlus equal ${dieRadius}*1.05
variable dieRadiusPlusNeg equal -${dieRadiusPlus}
region xPlanePos plane ${dieRadiusPlus} 0 0 -1 0 0 side in units box move v_disp_xPlanePos NULL NULL units box
region xPlaneNeg plane ${dieRadiusPlusNeg} 0 0 1 0 0 side in units box move v_disp_xPlaneNeg NULL NULL units box

fix lowerPunch all wall/gran/region ${wall_contact_string} region lowerPunch contacts
fix upperPunch all wall/gran/region ${wall_contact_string} region upperPunch contacts
fix die all wall/gran/region ${wall_contact_string} region die contacts
fix xPlanePos all wall/gran/region ${wall_contact_string} region xPlanePos contacts
fix xPlaneNeg all wall/gran/region ${wall_contact_string} region xPlaneNeg contacts

compute avgPunchForce all reduce sum f_upperPunch[4]
variable avgPunchForce equal c_avgPunchForce
compute avgLowerPunchForce all reduce sum f_lowerPunch[4]
variable avgLowerPunchForce equal c_avgLowerPunchForce
compute fractureForce all reduce sum f_xPlanePos[2]
variable fractureForce equal c_fractureForce

fix print1 all print 1 "${disp_upper} ${avgPunchForce} ${avgLowerPunchForce} ${fractureForce}" file upperPunchDispForce.csv screen no

##################################### INSERT PARTICLES ####################################################

fix 1 all nve/sphere
fix grav all gravity 9.81 vector 0 0 -1

######################################## SCREEN OUTPUT  ####################################################

compute       1 all erotate/sphere
thermo_style  custom dt step atoms ke vol v_disp_upper
thermo        100
thermo_modify lost ignore norm no

##################################### SET UP DUMP OUTPUTS  ####################################################

compute ke all ke/atom
variable output_rate equal round(1e-3/dt)

run 0

dump dumpParticles all custom ${output_rate} avicelTableting.dump id type mass diameter x y z vx vy vz fx fy fz c_ke

######################################### RUN SIMULATION ##########################################

variable        upper_punch_stroke equal 0.71*${dieHeight} # 0.6733
variable        vel_upper equal 0.25

variable        settling_steps equal round(0.02/dt)
variable 		compression_steps equal 2*round(${upper_punch_stroke}/${vel_upper}/dt)
variable        ejection_steps equal ${compression_steps}
variable        free_float_steps equal round(0.02/dt)
variable        total_steps equal ${settling_steps}+${compression_steps}+${ejection_steps}+${free_float_steps}

print "Total steps = ${total_steps}"

##### SETTLING #####

run		        ${settling_steps}

##### Compression & Release #####

variable        punch_frequency equal PI/2/(dt*${compression_steps}/2)
variable        disp_upper equal -${upper_punch_stroke}*sin(${punch_frequency}*elapsed*dt)
variable        short_release equal round(${compression_steps}*1.0)
run             ${short_release} # 189170 upto #

##### EJECTION #####

variable        punch_frequency equal PI/2/(dt*${ejection_steps})
variable        disp_lower equal ${dieHeight}*sin(${punch_frequency}*elapsed*dt)
variable 		disp_upper equal 0.9*v_disp_lower
run             ${ejection_steps}

##### FREE FLOAT #####

variable 		disp_lower equal ${dieHeight}
variable 		disp_upper equal ${dieHeight}*0.9
variable        max_disp equal ${dieRadius}*0.75
#variable        disp_xPlanePos equal -${max_disp}*elapsed/${free_float_steps}
#variable        disp_xPlaneNeg equal -v_disp_xPlanePos
run 			${free_float_steps}
