############################### SIMULATION SETTINGS ###################################################

atom_style sphere 1
atom_modify map array
comm_modify vel yes
units si
newton off
neighbor      6 bin
neigh_modify  delay 0
timestep 0.001
processors 2 1 1

######################### SIMULATION BOUNDING BOX, INTEGRATION, AND, GRAVITY ###########################

boundary f f f
region simBox block -100 100 -100 100 -100 100
create_box 2 simBox

########################### PARTICLE MATERIAL PROPERTIES AND FORCE MODEL ###############################

pair_style granular
# E, nu, Y, gamma, psi_b, CoR
pair_coeff * * mdr 5e8 0.3 25e6 0.0 0.78 1.0 tangential linear_nohistory 0.0 0.0

##################################### INSERT PARTICLES ####################################################

variable d equal 20
variable den equal 1000

create_atoms 1 single -10 0 0 units box
group xnegAtom id 1
set atom 1 diameter ${d} density ${den}

create_atoms 1 single 10 0 0 units box
group xposAtom id 2
set atom 2 diameter ${d} density ${den}

create_atoms 1 single -10 -20 0 units box
group thirdAtom id 3
set atom 3 diameter ${d} density ${den}

######################################## SCREEN OUTPUT  ####################################################

compute       1 all erotate/sphere
thermo_style  custom dt step atoms ke c_1 vol
thermo        1000
thermo_modify lost ignore norm no

##################################### DEFINE RUN CONTROL VARIBLES  #############################################

# Linear movement
variable mydt equal dt
variable mystep equal step
variable mytime equal ${mydt}*v_mystep
variable ddelta equal ${d}/2000
variable slope equal ${ddelta}/${mydt}
variable disp equal ${slope}*v_mytime
variable disp_neg equal -v_disp
variable vel equal ${ddelta}/${mydt}
variable vel_neg equal -${vel}
variable zeroDisp equal 0.0

variable deltaI     equal 6.25 #1.25
variable deltaII    equal 3.0
variable deltaIII   equal 4.75
variable deltaIV    equal 6.25

variable stepsIload equal     round(${deltaI}/${ddelta})
variable stepsIunload equal   round(${stepsIload}+${deltaI}/${ddelta})
variable stepsIIload equal    round(${stepsIunload}+${deltaII}/${ddelta})
variable stepsIIunload equal  round(${stepsIIload}+${deltaII}/${ddelta})
variable stepsIIIload equal   round(${stepsIIunload}+${deltaIII}/${ddelta})
variable stepsIIIunload equal round(${stepsIIIload}+${deltaIII}/${ddelta})
variable stepsIVload equal    round(${stepsIIIunload}+${deltaIV}/${ddelta})
variable stepsIVunload equal  round(${stepsIVload}+${deltaIV}/${ddelta})

##################################### SET UP DUMP OUTPUTS  ####################################################

#dump dumpParticles all vtk 1 post/particles_*.vtk x y z fx fy fz
dump dumpParticles all custom 10 particleSandwichCornerParallel.dump id type mass diameter x y z fx fy fz
variable x2 equal x[2]
variable x1 equal x[1]
variable del equal ${d}-(x[2]-x[1])
variable fx2 equal fx[2]
fix log all print 1 "${del},${fx2}" file particleSandwichCornerParallel.csv title "del,fx2" screen no

######################################### BEGIN RUN  ##########################################################

fix xposAtom_Iload xposAtom move linear ${vel_neg} 0.0 0.0
fix xnegAtom_Iload xnegAtom move linear ${vel} 0.0 0.0
fix thirdAtom_Iload thirdAtom move linear 0.0 ${vel} 0.0
run ${stepsIload} upto

unfix xposAtom_Iload
unfix xnegAtom_Iload
unfix thirdAtom_Iload
fix xposAtom_Iunload xposAtom move linear ${vel} 0.0 0.0
fix xnegAtom_Iunload xnegAtom move linear ${vel_neg} 0.0 0.0
fix thirdAtom_Iunload thirdAtom move linear 0.0 ${vel_neg} 0.0
run ${stepsIunload} upto

#unfix xposAtom_Iunload
#unfix xnegAtom_Iunload
#fix xposAtom_IIload xposAtom move linear ${vel_neg} 0.0 0.0
#fix xnegAtom_IIload xnegAtom move linear ${vel} 0.0 0.0
#run ${stepsIIload} upto
#
#unfix xposAtom_IIload
#unfix xnegAtom_IIload
#fix xposAtom_IIunload xposAtom move linear ${vel} 0.0 0.0
#fix xnegAtom_IIunload xnegAtom move linear ${vel_neg} 0.0 0.0
#run ${stepsIIunload} upto
#
#unfix xposAtom_IIunload
#unfix xnegAtom_IIunload
#fix xposAtom_IIIload xposAtom move linear ${vel_neg} 0.0 0.0
#fix xnegAtom_IIIload xnegAtom move linear ${vel} 0.0 0.0
#run ${stepsIIIload} upto
#
#unfix xposAtom_IIIload
#unfix xnegAtom_IIIload
#fix xposAtom_IIIunload xposAtom move linear ${vel} 0.0 0.0
#fix xnegAtom_IIIunload xnegAtom move linear ${vel_neg} 0.0 0.0
#run ${stepsIIIunload} upto
#
#unfix xposAtom_IIIunload
#unfix xnegAtom_IIIunload
#fix xposAtom_IVload xposAtom move linear ${vel_neg} 0.0 0.0
#fix xnegAtom_IVload xnegAtom move linear ${vel} 0.0 0.0
#run ${stepsIVload} upto
#
#unfix xposAtom_IVload
#unfix xnegAtom_IVload
#fix xposAtom_IVunload xposAtom move linear ${vel} 0.0 0.0
#fix xnegAtom_IVunload xnegAtom move linear ${vel_neg} 0.0 0.0
#run ${stepsIVunload} upto
